// SBML level 2 version 4
// command line:
// KaDE   -i   test.ka    -ode-backend  SBML

model KaDe_output_()

  // Compartments:
  compartment default = 1 volume;

  // Species:
  species K_d_x_u in default = 1/default; K_d_x_u is "K(d[.],x{u}[.])";
  species S_d_x_u in default = 1/default; S_d_x_u is "S(d[.],x{u}[.])";
  species K_d_1_x_u_S_d_1_x_u in default = 0; K_d_1_x_u_S_d_1_x_u is "K(d[1],x{u}[.]), S(d[1],x{u}[.])";
  species K_d_x_p in default = 0; K_d_x_p is "K(d[.],x{p}[.])";
  species K_d_1_x_p_S_d_1_x_u in default = 0; K_d_1_x_p_S_d_1_x_u is "K(d[1],x{p}[.]), S(d[1],x{u}[.])";
  species K_d_1_x_p_S_d_1_x_p in default = 0; K_d_1_x_p_S_d_1_x_p is "K(d[1],x{p}[.]), S(d[1],x{p}[.])";
  species S_d_x_p in default = 0; S_d_x_p is "S(d[.],x{p}[.])";
  species K_d_1_x_u_S_d_1_x_p in default = 0; K_d_1_x_u_S_d_1_x_p is "K(d[1],x{u}[.]), S(d[1],x{p}[.])";

  // Parameters:
  tinit = 0 time;
  tend = 1 time;
  period = 0.01 time;
  VA = 1;
  mod_rate_slow = 0.05;
  mod_rate = 5;
  off_rate_slow = 1;
  off_rate_fast = 1000;

  // Reactions:
  re1: K_d_1_x_u_S_d_1_x_u => K_d_1_x_p_S_d_1_x_u; mod_rate_slow*K_d_1_x_u_S_d_1_x_u; re1 is "pK";
  re2: K_d_1_x_u_S_d_1_x_u => K_d_x_u + S_d_x_u; off_rate_fast*K_d_1_x_u_S_d_1_x_u; re2 is "u";
  re3: K_d_1_x_u_S_d_1_x_u => K_d_1_x_u_S_d_1_x_p; mod_rate*K_d_1_x_u_S_d_1_x_u; re3 is "p";
  re4: K_d_1_x_u_S_d_1_x_p => K_d_1_x_p_S_d_1_x_p; mod_rate_slow*K_d_1_x_u_S_d_1_x_p; re4 is "pK";
  re5: K_d_1_x_u_S_d_1_x_p => K_d_x_u + S_d_x_p; off_rate_fast*K_d_1_x_u_S_d_1_x_p; re5 is "u";
  re6: K_d_x_u + S_d_x_p => K_d_1_x_u_S_d_1_x_p; 1/VA*S_d_x_p*K_d_x_u; re6 is "b";
  re7: K_d_x_p + S_d_x_p => K_d_1_x_p_S_d_1_x_p; 1/VA*S_d_x_p*K_d_x_p; re7 is "b";
  re8: K_d_1_x_p_S_d_1_x_p => K_d_x_p + S_d_x_p; off_rate_slow*K_d_1_x_p_S_d_1_x_p; re8 is "u*";
  re9: K_d_1_x_p_S_d_1_x_u => S_d_x_u + K_d_x_p; off_rate_slow*K_d_1_x_p_S_d_1_x_u; re9 is "u*";
  re10: K_d_1_x_p_S_d_1_x_u => K_d_1_x_p_S_d_1_x_p; mod_rate*K_d_1_x_p_S_d_1_x_u; re10 is "p";
  re11: S_d_x_u + K_d_x_p => K_d_1_x_p_S_d_1_x_u; 1/VA*S_d_x_u*K_d_x_p; re11 is "b";
  re12: K_d_x_u => K_d_x_p; mod_rate_slow*K_d_x_u; re12 is "pK";
  re13: K_d_x_u + S_d_x_u => K_d_1_x_u_S_d_1_x_u; 1/VA*S_d_x_u*K_d_x_u; re13 is "b";

  // Unit definitions:
  unit substance = mole;
  unit volume = litre;
end
